// SBML level 3 version 1
// Generated on Fri 18 Aug 2017 15:48:33
// Generated by Mathematica

model TempTitle()
  // TempName
  // Markevich2004 - MAPK double phosphorylation, ordered Michaelis-Menton

  // Compartments:
  compartment Cytosol = 1;
  compartment uVol = 1 Liter;

  // Species:
  species Ctsl in Cytosol = 1 item;
  species Gd1 in Cytosol = 100 item;
  species Gd in Cytosol = 3000;

  // Parameters:
  AKcAKck1 = 20;
  AKcAKck2 = 20;
  param1 = .00001 substance;
  param2 = 11;
  param3 = .12;
  param4 = .31;

  // Assignment rules:
  Ras_GTP := param2 + param3 + param4;

  // Rate rules:
  r1' = 3/param4*(-param2 + param1());

  // Algebraic rules:
  0 = param4 + param3 - param2;

  // Reactions:
  v1: Ctsl => Gd + Gd1; (AKcAKck1*Ctsl^2 - AKcAKck2*Gd*Gd1)/param1;

  // Unit definitions:
  unit substance = 1e-9 mole * gram;
  unit volume = 1e-9 litre * 2e-9 mole;
end
